# Beregning af modstandsværdier til spændingsdeler i feedback
V_out := 21 V
V_FB := 2.5 V
I_FB1 := 1 mA
R_FB1 := (V_out - V_FB)/I_FB1 = 18.5 kΩ
R_FB1 := 18 kΩ
R_FB2 := V_FB/I_FB1 = 2.5 kΩ
R_FB2 := 2.4 kΩ
# Beregning af RC komponenter til oscillator
f_s := 100 kHz
R_T := 50 kΩ  # Foreslået værdi mellem 10k og 200k ifølge datablad
C_T := f_s == 1.5/(R_T*C_T) solve, C_T → 0.0003/(kHz*kΩ) = 300 pF  # Foreslået 100pF til 1000pF
# Beregning af formodstand til MOSFET ud fra charge tid
t_ch := 100 ns
Q_gd := 7.9 nC
V_DD := 12 V
V_gs := 5 V
R_g := t_ch == Q_gd*R_g/(V_DD - V_gs) solve, R_g → 88.6075949367*V*ns/nC = 88.6076 Ω
# Beregning af current sense modstand og offset netværk
I_ppk := 5.65 A
V_CS := 900 mV
V_Rcs := 100 mV
I_bias := 50 μA
V_ref := 5 V
R_CS := V_Rcs/I_ppk = 0.0176991 Ω
P_Rcs := I_ppk^2*R_CS = 0.565 W
R_CSF := (V_CS - V_Rcs)/I_bias = 16 kΩ
R_P := (V_ref - V_CS)/I_bias = 82 kΩ
# Beregning af 0-punkter
R_out := 8.4 Ω
D := 0.447
N_ps := 1
L_p := 51.84 μH
R_ESR := 15 Ω*10^-3
C_out := 150 μF
f_RHPZ := R_out*(1 - D)^2*N_ps^2/(2*π*L_p*D) = 17.6432 kHz
ω_RHPZ := 2*π*f_RHPZ
f_ESRz := 1/(2*π*R_ESR*C_out) = 70.7355 kHz
ω_ESRz := 2*π*f_ESRz
f_BW := f_RHPZ/4 = 4.4108 kHz
# Beregning af poler
τ_L := 2*L_p*f_s/(R_out*N_ps) = 1.23429
f_p1 := ((1 - D)^3/τ_L + 1 + D)/(2*π*R_out*C_out) = 200.082 Hz
ω_p1 := 2*π*f_p1
f_p2 := f_s/2 = 50 kHz
ω_p2 := 2*π*f_p2
# Beregning af kompensationsnetværk
C_FB := 1/(2*π*1 kΩ*f_RHPZ) = 9.02076 nF
f_cz := f_BW/10 = 441.08 Hz
C_z := 10 nF
R_z := 1/(2*π*f_cz*C_z) = 36.083 kΩ
# Open-loop gain:
M := 21 V*N_ps/(26 V) = 0.807692
A_CS := 1.65
R_CS := 0.75 Ω
G_o := R_out*N_ps/(R_CS*A_CS)*1/((1 - D)^2/τ_L + (2*M) + 1) = 2.37078
Q_P := 1
H_0(s) := G_o*(1 + s/ω_ESRz)*(1 - s/ω_RHPZ)/(1 + s/ω_p1)*1/(1 + s/(ω_p2*Q_P) + s^2/ω_p2^2)
f_BW := 5 kHz
T_s := 16/f_BW = 3.2 ms
T_r := 2/f_BW = 0.4 ms
T_p := 4.6/f_BW = 0.92 ms
