# Beregning af duty-cycle ved:
V_d := 100 V
V_out := 12 V
N_p := 10
D_1 := 0.05
N_s := V_out == 2*N_s/N_p*D_1*V_d solve, N_s → 12.0
V_d := 26 V
V_out := 21 V
D_2 := V_out == 2*N_s/N_p*D_2*V_d solve, D_2 → 0.336538461538
# Duty-cycle ved omsætningsforhold på 1
D := V_out == 2*1*D*V_d solve, D → 21/52 = 0.403846
