V_out21 := 21 V
V_inmax := 50 V
V_inmin := 26 V
N_ps := 1
L := 57.76 μH
f_s := 100 kHz
T := 1/f_s = 1e-5 s
V_D := 0.45 V
D_max21 := (V_out21 + V_D)/(V_inmin + V_out21 + V_D) = 0.452055
# Diode krav - Krav til spænding og strøm samt effekttab, ses både med udgang på 5A og 2.5A
I_out21 := 2.5 A
V_break := V_out21 + V_inmax = 71 V
I_D1 := I_out21/(1 - D_max21) = 4.5625 A
P_D1 := I_out21*V_D = 1.125 W
# MOSFET krav (21V, 2.5A) - Spændingskrav samt tab med bestemt MOSFET for at give overblik
V_ds := (V_inmax + N_ps*(V_out21 + V_D))*1.3 = 92.885 V
R_ds := 113 Ω*10^-3
t_r := 138 ns
t_f := 138 ns
I_ripple21 := V_inmin*D_max21/(L*f_s) = 2.03487 A
I_pkavg21 := I_out21/(1 - D_max21) = 4.5625 A
I_pk21 := I_pkavg21 + I_ripple21/2 = 5.57994 A
I_RMSp21 := sqrt(D_max21*I_pkavg21^2) = 3.0676 A
I_RMSs21 := sqrt((1 - D_max21)*I_pkavg21^2) = 3.37731 A
P_cond := I_RMSp21^2*R_ds = 1.06335 W
P_sw := 1/2*I_pk21*(V_inmax + V_out21)*(t_r + t_f)/T = 5.46722 W
# Beregning af kernetab i transformator
A_0 := 63 mm^2
N := 19
V_e := 2440 mm^3
# Udregnet B felt
ΔB := L*I_pk21/(N*A_0) = 269.254 T*10^-3
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B := ΔB/2 = 134.627 T*10^-3
# Gå man ind på kurven omkring 50mT ved 100kHz, skærer omkring 15
P_V := 150 kW/m^3
P := P_V*V_e = 366 mW
# Dette giver ikke i nærheden af kernetabet vi fandt frem til ved pspice på omkring 350mT.. Kan det skyldes at kurven er for 100grader, eller er det en forkert måde at finde kernetabet på?
# Kobbertab i traansformatoren
# Beregner en omkredsen af spoleformen, ud fra en gennemsnitlig diameter
D := (9.95 mm + 16.9 mm)/2 = 13.425 mm
O := D*π = 4.21759 cm
# Beregner længden af kobbertråden
l := O*N = 80.1342 cm
# Uden lakering har den valgte tråd en kobberdiameter på 0,375mm
d := 0.375 mm
# Ud fra den diameter beregnes trådens tværsnitsareal
A_cu := (d/2)^2*π = 0.110447 mm^2
# Beregning af DC modstand i tråden
ρ := 2.204*10^-8 Ω*m  # Ved 100 grader
R_dc1 := ρ*l/A_cu = 159.91 Ω*10^-3
# Da transformatoren har 3 viklinger i parallel, beregnes den samlede modstand
R_dc := (R_dc1^-1*3)^-1 = 53.3035 Ω*10^-3
I_RMSp := 3.021 A
I_RMSs := 3.361 A
P_cup := I_RMSp^2*R_dc = 0.486471 W
P_cus := I_RMSs^2*R_dc = 0.602133 W
I_ripple21 := V_inmin*D_max21/(L*f_s) = 2.03487 A
I_pkavg21 := I_out21/(1 - D_max21) = 4.5625 A
I_pk21 := I_pkavg21 + I_ripple21/2 = 5.57994 A
I_RMSp21 := sqrt(D_max21*I_pkavg21^2) = 3.0676 A
I_RMSs21 := sqrt((1 - D_max21)*I_pkavg21^2) = 3.37731 A
# Current-sense tab
R_cs := 167 Ω*10^-3
P_cs := I_RMSp^2*R_cs = 1.52412 W
# Effektivitet 2. iteration, ved lav indgangsspænding
V_in := 26 V
I_in := 2.35 A
V_out := 21.07 V
I_out := 2.49 A
P_in := V_in*I_in = 61.1 W
P_out := V_out*I_out = 52.4643 W
P_loss := P_in - P_out = 8.6357 W
η := P_out/P_in*100 = 85.8663
# Effektivitet, ved lav inputspænding:
V_in := 26 V
I_in := 2.3 A
V_out := 20.99 V
I_out := 2.57 A
P_in := V_in*I_in = 59.8 W
P_out := V_out*I_out = 53.9443 W
η := P_out/P_in*100 = 90.2079
P_loss := P_in - P_out = 5.8557 W
# Effektivitet ved høj inputspænding
V_in := 50 V
I_in := 1.1 A
V_out := 20.99 V
I_out := 2.5 A
P_in := V_in*I_in = 55 W
P_out := V_out*I_out = 52.475 W
η := P_out/P_in*100 = 95.4091
P_loss := P_in - P_out = 2.525 W
